// additional ligaments in pelvic floor

// ---------------- Ligament Models ----------------
AnyFolder LigamentModels = {

  AnyLigamentModelPol Model_AnococcygealLig = {
    L0 = 0.1;
    eps1 = 0.1;
    F1 = 3.4;
    //a0 = 1.0;
    //a1 = 1.0;
    //LinRegionOnOff = On;
  };

  AnyLigamentModelPol Model_AnalHiatus = {
    L0 = 0.05;
    eps1 = 0.1;
    F1 = 3.4;
    //a0 = 1.0;
    //a1 = 1.0;
    //LinRegionOnOff = On;
  };

  AnyLigamentModelPol Model_UrogenitalHiatus = {
    L0 = 0.1;
    eps1 = 0.1;
    F1 = 3.4;
    //a0 = 1.0;
    //a1 = 1.0;
    //LinRegionOnOff = On;
  };

  AnyLigamentModelPol Model_TendinousArch = {
    L0 = 0.15;
    eps1 = 0.1;
    F1 = 3.4;
    //a0 = 1.0;
    //a1 = 1.0;
    //LinRegionOnOff = On;
  };

  AnyLigamentModelPol Model_BPtoTA = {
    L0 = 0.1;
    eps1 = 0.1;
    F1 = 3.4;
    //a0 = 1.0;
    //a1 = 1.0;
    //LinRegionOnOff = On;
  };

// AnyLigamentModelPol ModelHiatus = {
  // AnyFloat dist1 = sqrt(
  //   pow(..Segments.SegPointA.r0[0] - ..Segments.SegPointP.r0[0], 2) +
  //   pow(..Segments.SegPointA.r0[1] - ..Segments.SegPointP.r0[1], 2) +
  //   pow(..Segments.SegPointA.r0[2] - ..Segments.SegPointP.r0[2], 2)
  // );
  // AnyFloat dist2 = sqrt(
  //  pow(..Segments.SegPointP.r0[0] - ..Segments.SegPointC.r0[0], 2) +
  //  pow(..Segments.SegPointP.r0[1] - ..Segments.SegPointC.r0[1], 2) +
  //  pow(..Segments.SegPointP.r0[2] - ..Segments.SegPointC.r0[2], 2)
  // );
  // AnyFloat LigLength = (dist1 + dist2) * 0.99; // assume ligament is stretched by 1% in rest position
  // L0 = LigLength;
  // eps1 = 0.1;
  // F1 = 3.4;
  // a0 = 1.0;
  // a1 = 1.0;
  // LinRegionOnOff = On;

}; // -------------------------------------- END OF LIGAMENT MODELS


// ---------------- Ligament Paths ----------------
// using via point muscle and color coding to match sketched model
AnyFolder PelvicLigaments = {

  AnyLigamentViaPoint AnococcygealLigament = {
    AnyLigamentModel &model = ..LigamentModels.Model_AnococcygealLig;
    AnyRefFrame &ins = ...Segments.PelvicFloor.BONYPELVIS.COCCYX;
    AnyRefFrame &via = ...Segments.PelvicFloor.SegmentG;
    AnyRefFrame &orig = ...Segments.PelvicFloor.SegmentF;
    AnyDrawPLine drw = {
      Thickness = 1e-3;
      RGB = {0.85, 0.85, 0.85};
    };
  };

  AnyLigamentViaPoint AnalHiatus = {
    AnyLigamentModel &model = ..LigamentModels.Model_AnalHiatus;
    AnyRefFrame &ins = ...Segments.PelvicFloor.SegmentD;
    AnyRefFrame &via = ...Segments.PelvicFloor.SegmentC;
    AnyRefFrame &orig = ...Segments.PelvicFloor.SegmentE;
    AnyDrawPLine drw = {
      Thickness = 1e-3;
      RGB = {0.85, 0.85, 0.85};
    };
  };

  AnyLigamentViaPoint UrogenitalHiatus = {
    AnyLigamentModel &model = ..LigamentModels.Model_UrogenitalHiatus;
    AnyRefFrame &ins = ...Segments.PelvicFloor.BONYPELVIS.PUBIS_R;
    AnyRefFrame &via1 = ...Segments.PelvicFloor.SegmentA;
    AnyRefFrame &via2 = ...Segments.PelvicFloor.SegmentC;
    AnyRefFrame &via3 = ...Segments.PelvicFloor.SegmentB;
    AnyRefFrame &orig = ...Segments.PelvicFloor.BONYPELVIS.PUBIS_L;
    AnyDrawPLine drw = {
      Thickness = 1e-3;
      RGB = {0.85, 0.85, 0.85};
    };
  };

  AnyLigamentViaPoint TendinousArchR = {
    AnyLigamentModel &model = ..LigamentModels.Model_TendinousArch;
    AnyRefFrame &ins = ...Segments.PelvicFloor.BONYPELVIS.PUBIS_R;
    AnyRefFrame &via1 = ...Segments.PelvicFloor.SegmentS;
    AnyRefFrame &via2 = ...Segments.PelvicFloor.SegmentT;
    AnyRefFrame &via3 = ...Segments.PelvicFloor.SegmentU;
    AnyRefFrame &via4 = ...Segments.PelvicFloor.SegmentV;
    AnyRefFrame &orig = ...Segments.PelvicFloor.BONYPELVIS.ISCHIALSPINE_R;
    AnyDrawPLine drw = {
      Thickness = 1e-3;
      RGB = {0.85, 0.85, 0.85};
    };
  };

  AnyLigamentViaPoint TendinousArchL = {
    AnyLigamentModel &model = ..LigamentModels.Model_TendinousArch;
    AnyRefFrame &ins = ...Segments.PelvicFloor.BONYPELVIS.PUBIS_L;
    AnyRefFrame &via1 = ...Segments.PelvicFloor.SegmentW;
    AnyRefFrame &via2 = ...Segments.PelvicFloor.SegmentX;
    AnyRefFrame &via3 = ...Segments.PelvicFloor.SegmentY;
    AnyRefFrame &via4 = ...Segments.PelvicFloor.SegmentZ;
    AnyRefFrame &orig = ...Segments.PelvicFloor.BONYPELVIS.ISCHIALSPINE_L;
    AnyDrawPLine drw = {
      Thickness = 1e-3;
      RGB = {0.85, 0.85, 0.85};
    };
  };

  AnyLigamentViaPoint TA1 = {
    AnyLigamentModel &model = ..LigamentModels.Model_BPtoTA;
    AnyRefFrame &ins = ...Segments.PelvicFloor.BONYPELVIS.POINT1;
    AnyRefFrame &orig = ...Segments.PelvicFloor.SegmentS;
    AnyDrawPLine drw = {
      Thickness = 1e-3;
      RGB = {0.85, 0.85, 0.85};
    };
  };

  AnyLigamentViaPoint TA2 = {
    AnyLigamentModel &model = ..LigamentModels.Model_BPtoTA;
    AnyRefFrame &ins = ...Segments.PelvicFloor.BONYPELVIS.POINT2;
    AnyRefFrame &orig = ...Segments.PelvicFloor.SegmentT;
    AnyDrawPLine drw = {
      Thickness = 1e-3;
      RGB = {0.85, 0.85, 0.85};
    };
  };

  AnyLigamentViaPoint TA3 = {
    AnyLigamentModel &model = ..LigamentModels.Model_BPtoTA;
    AnyRefFrame &ins = ...Segments.PelvicFloor.BONYPELVIS.POINT3;
    AnyRefFrame &orig = ...Segments.PelvicFloor.SegmentU;
    AnyDrawPLine drw = {
      Thickness = 1e-3;
      RGB = {0.85, 0.85, 0.85};
    };
  };

  AnyLigamentViaPoint TA4 = {
    AnyLigamentModel &model = ..LigamentModels.Model_BPtoTA;
    AnyRefFrame &ins = ...Segments.PelvicFloor.BONYPELVIS.POINT4;
    AnyRefFrame &orig = ...Segments.PelvicFloor.SegmentV;
    AnyDrawPLine drw = {
      Thickness = 1e-3;
      RGB = {0.85, 0.85, 0.85};
    };
  };

  AnyLigamentViaPoint TA5 = {
    AnyLigamentModel &model = ..LigamentModels.Model_BPtoTA;
    AnyRefFrame &ins = ...Segments.PelvicFloor.BONYPELVIS.POINT5;
    AnyRefFrame &orig = ...Segments.PelvicFloor.SegmentW;
    AnyDrawPLine drw = {
      Thickness = 1e-3;
      RGB = {0.85, 0.85, 0.85};
    };
  };

  AnyLigamentViaPoint TA6 = {
    AnyLigamentModel &model = ..LigamentModels.Model_BPtoTA;
    AnyRefFrame &ins = ...Segments.PelvicFloor.BONYPELVIS.POINT6;
    AnyRefFrame &orig = ...Segments.PelvicFloor.SegmentX;
    AnyDrawPLine drw = {
      Thickness = 1e-3;
      RGB = {0.85, 0.85, 0.85};
    };
  };

  AnyLigamentViaPoint TA7 = {
    AnyLigamentModel &model = ..LigamentModels.Model_BPtoTA;
    AnyRefFrame &ins = ...Segments.PelvicFloor.BONYPELVIS.POINT7;
    AnyRefFrame &orig = ...Segments.PelvicFloor.SegmentY;
    AnyDrawPLine drw = {
      Thickness = 1e-3;
      RGB = {0.85, 0.85, 0.85};
    };
  };

  AnyLigamentViaPoint TA8 = {
    AnyLigamentModel &model = ..LigamentModels.Model_BPtoTA;
    AnyRefFrame &ins = ...Segments.PelvicFloor.BONYPELVIS.POINT8;
    AnyRefFrame &orig = ...Segments.PelvicFloor.SegmentZ;
    AnyDrawPLine drw = {
      Thickness = 1e-3;
      RGB = {0.85, 0.85, 0.85};
    };
  };


}; // -------------------------------------- END OF LIGAMENT PATHS
