#ifndef BM_PELVIS_DISPLAY
  #define BM_PELVIS_DISPLAY 2
#endif

#ifdef LEG_MODEL_PARAM_DIRECTION
  #undef LEG_MODEL_PARAM_DIRECTION
#endif

#ifndef LEG_MODEL_PARAM_DIRECTION
  #if BM_LEG_RIGHT != OFF
    #define LEG_MODEL_PARAM_DIRECTION Right
  #endif
#endif

#ifndef LEG_MODEL_PARAM_DIRECTION
  #if BM_LEG_LEFT != OFF
    #define LEG_MODEL_PARAM_DIRECTION Left
  #endif
#endif

#if (BM_LEG_LEFT == OFF & BM_LEG_RIGHT == OFF)
  #ifdef BM_LEG_TRUNK_INTERFACE
    #undef BM_LEG_TRUNK_INTERFACE
  #endif
  #define BM_LEG_TRUNK_INTERFACE _MORPH_NONE_
#endif

AnySeg PelvisSeg = {
  #ifdef LEG_MODEL_PARAM_DIRECTION
    #if BM_LEG_MODEL == _LEG_MODEL_LEG_
      AnyFolder& Leg_ModelParameters = ...LEG_MODEL_PARAM_DIRECTION.Leg.StandardParameters;
    #endif
    #if BM_LEG_MODEL_IS_TLEM
      AnyFolder& Leg_ModelParameters = ...LEG_MODEL_PARAM_DIRECTION.Leg.ModelParameters;
    #endif
  #endif

  #define MACRO_CONSTRUCT_ANATOMICAL_FRAME_s(p) (0.5*(p[0]+p[1]))
  #define MACRO_CONSTRUCT_ANATOMICAL_FRAME_A(p) (RotMat(0.5*(p[0]+p[1]), p[0], 0.5*(p[2]+p[3]))*RotMat(pi/2, y)*RotMat(pi,z))

  #include "PelvisInterfaceMorphing.any"

  #undef MACRO_CONSTRUCT_ANATOMICAL_FRAME_s
  #undef MACRO_CONSTRUCT_ANATOMICAL_FRAME_A


  // additional nodes on bony pelvis (immoveable)
  // AnyRefNode COCCYX is defined in SacrumSeg
  // AnyRefNode ISCHIALSPINE_R  = {  sRel = {0, 0, 0};   };
  // AnyRefNode ISCHIALSPINE_L  = {  sRel = {0, 0, 0};  };
  // AnyRefNode POINT1          = {  sRel = {0, 0, 0};   };
  // AnyRefNode POINT2          = {  sRel = {0, 0, 0};  };
  // AnyRefNode POINT3          = {  sRel = {0, 0, 0};   };
  // AnyRefNode POINT4          = {  sRel = {0, 0, 0};  };
  // AnyRefNode POINT5          = {  sRel = {0, 0, 0};  };
  // AnyRefNode POINT6          = {  sRel = {0, 0, 0};   };
  // AnyRefNode POINT7          = {  sRel = {0, 0, 0};  };
  // AnyRefNode POINT8          = {  sRel = {0, 0, 0};  };
  // AnyRefNode PUBIS_R         = {  sRel = {0, 0, 0};  };
  // AnyRefNode PUBIS_L         = {  sRel = {0, 0, 0}; };


  /// This is the anatomical frame that has axes aligned with the global coordinate system
  /// of the trunk dataset. This frame defines the neutral orientation of the pelvis
  /// segment.
  AnyRefNode AnatomicalFrameTrunk = {
    sRel = definition.sRel;
    ARel = definition.ARel;

    TrunkAnatomicalFrameDefinition definition() = {
      asis_right = ..Right.ASIS.sRel;
      asis_left = ..Left.ASIS.sRel;
      sacrum_point = ...SacrumSeg.SacrumPosteriorSuperior.sRel;
      c7_point = ...C7Seg.MidNode.sRel;
    };

    TrunkPelvisScaleWithInterfaceMorphing Scale_Trunk_Pelvis(
      InterfaceMorphing = ..InterfaceMorphingDef.IM_Trunk_To_Leg_Unscaled,
      InterfaceMorphingC7 = ..InterfaceMorphingDef.IM_Trunk_To_Leg_AboveSacrum,
      GeomScale = ....Scaling.GeometricalScaling.Pelvis.ScaleFunction,
      GeomScaleC7 = ....Scaling.GeometricalScaling.C7Seg.ScaleFunction,
    ) = {
      unscaled = {
        asis_right = ...Data.Right.ASIS;
        asis_left = ...Data.Left.ASIS;
        c7_point = .....Data.unscaled.ModelParameters.C7.MidNode_pos;
        sacrum_point = .....Data.unscaled.ModelParameters.Sacrum.SacrumPosteriorSuperior_pos;
      };
    };

    #if (BM_LEG_MODEL_IS_TLEM)
      AnyFunTransform3D Scale_Leg_Pelvis = {
        PreTransforms = {
          &..InterfaceMorphingDef.IM_Leg_To_Trunk_Unscaled,
          &.Scale_Trunk_Pelvis.ScaleAfterInterfaceMorphing,
        };

        AnyFloat unscaled_points =  {
          .....LEG_MODEL_PARAM_DIRECTION.Leg.ModelParameters.Pelvis.RASIS,
          .....LEG_MODEL_PARAM_DIRECTION.Leg.ModelParameters.Pelvis.LASIS,
          .....LEG_MODEL_PARAM_DIRECTION.Leg.ModelParameters.Pelvis.RPT,
          .....LEG_MODEL_PARAM_DIRECTION.Leg.ModelParameters.Pelvis.LPT
        };
      };
    #else
      AnyFunTransform3D& Scale_Leg_Pelvis = Scale_Trunk_Pelvis;
    #endif
  };


  /// This is the anatomical frame that has axes aligned with the global coordinate system
  ///of the trunk dataset. This frame defines the neutral orientation of the pelvis
  ///segment (AMMR<2.5)
  AnyRefNode AnatomicalFrameISB = {
     sRel = 0.5*(.Scale(.Data.Right.ASIS)+.Scale(.Data.Left.ASIS));
     ARel = RotMat(sRel, .Scale(.Data.Right.ASIS), 0.5*(.Scale(.Data.Right.PSIS)+.Scale(.Data.Left.PSIS))) * RotMat(-pi/2,x) * RotMat(pi/2,y);
  };


  AnyRefNode CompatibilityFrameAMMR24 = {
    // Driving this frame wrt global will bring shoulders into the same postions and orientation
    // as would have been achived by driving the PelvisSeg directly in AMMR 2.4. Hence, this this
    // frames compensates for effect of the pelvic tilt and changes to trunk segmental references frames
    // in AMMR 3.0 without having to change the PelvisThroraxExtension angle. Note. minor difference
    // in posture may still exists due the new spine rhythm.
    ARel = RotMat(14.651915890528576*pi/180, z);
    AnyFloat OffsetX =  0.02593160581526004;
    AnyFloat OffsetY = 0.005646269635852812;
    sRel = {0.02593160581526004, 0.005646269635852812, 0};
  };


  /// This is an anatomical frame aligned with the ASIS and Pubic tubercle bony landmarks
  /// This was previously used as the neutral frame for pelvis.
  AnyRefNode AnatomicalFrame = {
    #define MACRO_CONSTRUCT_ANATOMICAL_FRAME_A(p) (RotMat(0.5*(p[0]+p[1]), p[0], 0.5*(p[2]+p[3]))*RotMat(pi/2, y)*RotMat(pi,z))

    AnyFloat pUnscaled_Trunk_Pelvis =  {
      .Data.Right.ASIS,
      .Data.Left.ASIS,
      .Data.Right.PT,
      .Data.Left.PT
    };

    AnyFloat pScaled = .AnatomicalFrameTrunk.Scale_Trunk_Pelvis(pUnscaled_Trunk_Pelvis);
    sRel = .AnatomicalFrameTrunk.sRel;
    ARel = MACRO_CONSTRUCT_ANATOMICAL_FRAME_A(pScaled);

    #undef MACRO_CONSTRUCT_ANATOMICAL_FRAME_A

    /// Folder containing the origins for defining each body region
    /// each region has it's own scalefunction that needs to know where the region starts.
    /// The joint position in segmental reference frame is interface morphed and
    /// transfered into the trunk anatomical frame
    AnyFolder ScalingOrigins = {
      AnyVec3 Pelvis = 0.5 * (
        ..InterfaceMorphingDef.IM_Trunk_To_Leg_Unscaled(....Data.unscaled.ModelParameters.Pelvis.Right.ASIS)
        + ..InterfaceMorphingDef.IM_Trunk_To_Leg_Unscaled(....Data.unscaled.ModelParameters.Pelvis.Left.ASIS)
      );

      AnyVec3 Lumbar = (
        ..InterfaceMorphingDef.IM_Trunk_To_Leg_AboveSacrum(....Data.unscaled.ModelParameters.Sacrum.SacrumL5JntNode_pos)
        - Pelvis
      );

      AnyVec3 Thorax = (
        ..InterfaceMorphingDef.IM_Trunk_To_Leg_AboveSacrum(....Data.unscaled.ModelParameters.T12.T12L1JntNode_pos)
        - Pelvis
      );

      AnyVec3 Cervical = (
        ..InterfaceMorphingDef.IM_Trunk_To_Leg_AboveSacrum(....Data.unscaled.ModelParameters.C7.T1C7JntNode_pos)
        - Pelvis
      );
    };
  };

  AnyRefNode& ScalingNode = AnatomicalFrameTrunk;
  AnyFunTransform3D& Scale = AnatomicalFrameTrunk.Scale_Trunk_Pelvis;
  TrunkScaleWithInterfaceMorphing ScaleAbdominal(
    GeomScale = ...Scaling.GeometricalScaling.Lumbar.ScaleFunction,
    PelvisSeg = ..PelvisSeg,
  ) = {};

  #ifdef SKIN
    #if SKIN
      AnyDrawSurf Drw2 = {
        FileName = .....LEG_MODEL_PARAM_DIRECTION.Leg.Seg.STL.FilenamePelvisSkin;
        ScaleXYZ = {1.0, 1.0, 1.0};
        RGB = ....ColorRef.Skin;
        Opacity = Main.DrawSettings.SkinOpacity.Opacity;
        AnyFunTransform3D &Scale =..GeomScale;
        Face=-1;
      };
    #endif
  #endif
  #ifdef MUSCLETISSUE
    #if MUSCLETISSUE
      AnyDrawSurf Drw1 = {
        FileName = .....LEG_MODEL_PARAM_DIRECTION.Leg.Seg.STL.FilenamePelvisMuscleTissue;
        ScaleXYZ = {1.0, 1.0, 1.0};
        RGB = ....ColorRef.MuscleTissue;
        Opacity = Main.DrawSettings.MuscleTissueOpacity.Opacity;
        AnyFunTransform3D &Scale =..GeomScale;
        Face=-1;
      };
    #endif
  #endif

  UseInertiaObjects = On;

  #if (BM_TRUNK_CAVITY_MODEL == _CAVITY_MODEL_VOLUME_) & (BM_TRUNK_MUSCLES == ON)
    AnyInertiaSolid BoneInertiaObject = {
      BodyMassCorrection massCorrection() = {
        DensityTheoretical = ....Data.unscaled.ModelParameters.BoneDensity;
        enableMassCorrection = Off;
      };

      AnySurfSTL surface = {
        FileName = ....Data.unscaled.STL.FilenamePelvisSeg;
        AnyFunTransform3D &scale = ..Scale;
      };
    };

    // Outer inertia representing skin
    AnyInertiaSolid OuterInertiaObject = {
      BodyMassCorrection massCorrection() = {};

      AnySurfSTL surface = {
        FileName = ....Data.unscaled.STL.FilenamePelvisInertia;
        AnyFunTransform3DLin scale = {
          ScaleMat = diag({1.1, 1.0, 1.1}); // Scaled 10% in x,z
          Offset = zeros(3);
        };
      };

      // We need to subtract sacrum and pelvis bones, and pelvic cavity inertia from the
      // outer since that encapsulates the whole volume
      AnySurfSTL negativePelvisBoneInertia = {
        FileName = ..BoneInertiaObject.surface.FileName;
        TriangleDirection = RotClockwise;
        viewSurface = {Visible = Off;};
      };
      AnySurfSTL negativeSacrumBoneInertia = {
        FileName = ...SacrumSeg.BoneInertiaObject.surface.FileName;
        TriangleDirection = RotClockwise;
        viewSurface = {Visible = Off;};
      };
      AnySurfTriCylMesh negativePelvicCavityInertia = {
        Points = ..PelvicCavityInertiaObject.inertia_cyl.Points;
        CylMesh = ..PelvicCavityInertiaObject.inertia_cyl.CylMesh;
        TriangleDirection = RotClockwise;
        viewSurface = {Visible = Off;};
      };
    };
  #else

    AnyInertiaMatrix InertiaObject = {
      BodyMassCorrectionCompatibility massCorrection() = {
        DensityTheoretical = .MassStandard;
      };
      JaboutCoMOnOff = On;

      // (Trunk to Leg Interface Morphing) -> Use the mass property of pelvis from the Leg
      #if BM_LEG_TRUNK_INTERFACE == _MORPH_TRUNK_TO_LEG_ & ( BM_LEG_MODEL_IS_TLEM )
        AnyVar MassStandard = ....LEG_MODEL_PARAM_DIRECTION.Leg.ModelParameters.Pelvis.MassStandard;
        Jii = ....LEG_MODEL_PARAM_DIRECTION.Leg.ModelParameters.Pelvis.Jii;
        Jij = ....LEG_MODEL_PARAM_DIRECTION.Leg.ModelParameters.Pelvis.Jij;
        sCoM = .AnatomicalFrameTrunk.Scale_Leg_Pelvis(....LEG_MODEL_PARAM_DIRECTION.Leg.ModelParameters.Pelvis.sCoM);
      #else //(Leg to Trunk Interface Morphing) or (No Interface Morphing) -> Use the mass property of pelvis from the Trunk
        AnyVar MassStandard = ...Data.unscaled.StandardParameters.Pelvis.Mass;
        Jii = {0.0221,0.01,0.0221}; //Taken from SimpleSpineModel
        Jij = {0, 0, 0};
        sCoM = .AnatomicalFrameTrunk.Scale_Trunk_Pelvis(.Data.sCoM_pos);
      #endif
    };
  #endif

  #if BM_LEG_MODEL == _LEG_MODEL_LEG_
    AnyRefNode HipJointRight = { sRel = .Scale({0.05002253, -0.1149108, 0.0895978});ARel=.AnatomicalFrame.ARel;};
    AnyRefNode HipJointLeft = {sRel = .Scale({0.05002253, -0.1149108, -0.0895978});ARel=.AnatomicalFrame.ARel;};
    AnyRefNode HipJointsCenter = { sRel = .Scale({0.05002253, -0.1149108, 0});ARel=.AnatomicalFrame.ARel;};
  #endif

  #include "../DrawSettings/SegmentAxes.any"
  AnyRefNode GroundPelvisJntNode = {sRel = .Scale(.Data.GroundPelvisJntNode_pos);};
  AnyRefNode PelvisSacrumJntNode = {sRel = .Scale(.Data.PelvisSacrumJntNode_pos);};
  AnyRefNode Seat2MidContactNode={sRel=0.5*(.Right.Seat2ContactNode.sRel+.Left.Seat2ContactNode.sRel);};
  AnyRefNode PelvicLayer1_JntNode={sRel=.Scale(.Data.PelvicLayer1_JntNode_pos);};
  AnyRefNode PelvicLayer2_JntNode={sRel=.Scale(.Data.PelvicLayer2_JntNode_pos);};
  AnyRefNode PelvicLayer3_JntNode={sRel=.Scale(.Data.PelvicLayer3_JntNode_pos);};

  /// The Right node is used by different body part for adding mirrored nodes
  /// (muscle origins/insertions etc) to the pelvis segment
  AnyRefNode Right= {
    AnyRefNode ScalingNode ={};
    AnyInt Sign = 1;
      AnyFunTransform3D& Scale = .Scale;
      AnyRefNode ASIS = {sRel = .Scale(..Data.Right.ASIS);};
      AnyRefNode PSIS = {sRel = .Scale(..Data.Right.PSIS);};
      AnyRefNode PT = {sRel = .Scale(..Data.Right.PT);};
      AnyRefNode PosteriorContactNode = {sRel = .Scale(..Data.Right.PosteriorContactNode_pos);};
      AnyRefNode Seat1ContactNode={sRel = .Scale(..Data.Right.Seat1ContactNode_pos);};
      AnyRefNode Seat2ContactNode={sRel = .Scale(..Data.Right.Seat2ContactNode_pos);};
      AnyRefNode Seat3ContactNode={sRel = .Scale(..Data.Right.Seat3ContactNode_pos);};
      AnyRefNode Seat4ContactNode={sRel = .Scale(..Data.Right.Seat4ContactNode_pos);};
      AnyRefNode TrochanterBonyTip ={sRel = .Scale(..Data.Right.TrochanterBonyTip_pos);};
  };

  /// The Left node is used by different body part for adding mirrored nodes
  /// (muscle origins/insertions etc) to the pelvis segment
  AnyRefNode Left=  {
    AnyRefNode ScalingNode ={};
    AnyInt Sign = -1;
      AnyFunTransform3D& Scale = .Scale;
      AnyRefNode ASIS = {sRel = .Scale(..Data.Left.ASIS);};
      AnyRefNode PSIS = {sRel = .Scale(..Data.Left.PSIS);};
      AnyRefNode PT = {sRel = .Scale(..Data.Left.PT);};
      AnyRefNode PosteriorContactNode = {sRel = .Scale(..Data.Left.PosteriorContactNode_pos);};
      AnyRefNode Seat1ContactNode={sRel = .Scale(..Data.Left.Seat1ContactNode_pos);};
      AnyRefNode Seat2ContactNode={sRel = .Scale(..Data.Left.Seat2ContactNode_pos);};
      AnyRefNode Seat3ContactNode={sRel = .Scale(..Data.Left.Seat3ContactNode_pos);};
      AnyRefNode Seat4ContactNode={sRel = .Scale(..Data.Left.Seat4ContactNode_pos);};
      AnyRefNode TrochanterBonyTip ={sRel = .Scale(..Data.Left.TrochanterBonyTip_pos);};
  };


  #if (! BM_LEG_MODEL_IS_TLEM) | (BM_PELVIS_DISPLAY == _PELVIS_DISPLAY_LEGANDTRUNKPELVIS_)
  #if (BM_PELVIS_DISPLAY == _PELVIS_DISPLAY_LEGANDTRUNKPELVIS_)
  AnyDrawSurf Drw_TrunkPelvis =
  #else
  AnyDrawSurf DrwPelvis =
  #endif
  {
    FileName = ...Data.unscaled.STL.FilenamePelvisWOS;
    #if ! BM_LEG_MODEL_IS_TLEM
      Opacity ??= Main.DrawSettings.BonesOpacity.Pelvis;
      RGB = ...ColorRef.Segments;
    #else
      Opacity ??= Main.DrawSettings.BonesOpacity.Pelvis * 0.5;
      RGB = ...ColorRef.Segments;
    #endif
    AnyFunTransform3D &Scale = .Scale;
  };

  #if (BM_PELVIS_DISPLAY == _PELVIS_DISPLAY_LEGANDTRUNKPELVIS_)
  AnyDrawSurf Drw_TrunkSacrum =
  #else
  AnyDrawSurf DrwSacrum =
  #endif
  {
    FileName = ...Data.unscaled.STL.FilenameSacrumSeg           ;
    #if (BM_LEG_LEFT == OFF) & (BM_LEG_RIGHT == OFF)
      Opacity ??= Main.DrawSettings.BonesOpacity.Pelvis;
      RGB = ...ColorRef.Segments;
    #else
      Opacity ??= Main.DrawSettings.BonesOpacity.Pelvis * 0.5;
      RGB = ...ColorRef.Segments;
    #endif
    AnyFunTransform3D &Scale = .Scale;
  };

  #endif

  AnyFolder &Data=..Data.unscaled.ModelParameters.Pelvis;
  #include "PelvisMuscleAttachementNodes.any"
}; // End of PelvisSeg

#ifdef LEG_MODEL_PARAM_DIRECTION
  #undef LEG_MODEL_PARAM_DIRECTION
#endif
