/*
In this file all interpolated nodes for their integration into the volume on pelvic bowl level (segments A, B, G)
and their visualization properties are defined.

This file is automatically created with a dedicated python script.
*/

SegPointG = {
  AnySwitchVar VisualizeAddedNodes = On;
  AnyFloat ColorNodes = {1,0,0};
};

SegPointA = {
  AnySwitchVar VisualizeAddedNodes = On;
  AnyFloat ColorNodes = {0,1,0};
};

SegPointB = {
  AnySwitchVar VisualizeAddedNodes = On;
  AnyFloat ColorNodes = {0,0,1};
};


// -------------------------------------------------------------------
// ---------------------- ADD NODES TO SEGMENTS ----------------------
// -------------------------------------------------------------------

SegPointG = {

  AnyRefNode Point01onG = {
    sRel = {0.000000, 0.000000, 0.000000};
    #include "SimplePelvisDrawAddedNode.any"
  };

  AnyRefNode Point02onG = {
    sRel = {-0.000150, 0.000040, 0.001532};
    #include "SimplePelvisDrawAddedNode.any"
  };

  AnyRefNode Point03onG = {
    sRel = {-0.000586, 0.000155, 0.003052};
    #include "SimplePelvisDrawAddedNode.any"
  };

  AnyRefNode Point04onG = {
    sRel = {-0.001284, 0.000340, 0.004548};
    #include "SimplePelvisDrawAddedNode.any"
  };

  AnyRefNode Point05onG = {
    sRel = {-0.002221, 0.000588, 0.006009};
    #include "SimplePelvisDrawAddedNode.any"
  };

  AnyRefNode Point06onG = {
    sRel = {-0.003374, 0.000893, 0.007423};
    #include "SimplePelvisDrawAddedNode.any"
  };

  AnyRefNode Point07onG = {
    sRel = {-0.004721, 0.001249, 0.008778};
    #include "SimplePelvisDrawAddedNode.any"
  };

  AnyRefNode Point08onG = {
    sRel = {-0.006238, 0.001651, 0.010062};
    #include "SimplePelvisDrawAddedNode.any"
  };

  AnyRefNode Point09onG = {
    sRel = {-0.007902, 0.002091, 0.011263};
    #include "SimplePelvisDrawAddedNode.any"
  };

  AnyRefNode Point10onG = {
    sRel = {-0.009691, 0.002564, 0.012370};
    #include "SimplePelvisDrawAddedNode.any"
  };

  AnyRefNode Point11onG = {
    sRel = {-0.011581, 0.003065, 0.013371};
    #include "SimplePelvisDrawAddedNode.any"
  };

  AnyRefNode Point47onG = {
    sRel = {-0.011581, 0.003065, -0.013371};
    #include "SimplePelvisDrawAddedNode.any"
  };

  AnyRefNode Point48onG = {
    sRel = {-0.009691, 0.002564, -0.012370};
    #include "SimplePelvisDrawAddedNode.any"
  };

  AnyRefNode Point49onG = {
    sRel = {-0.007902, 0.002091, -0.011263};
    #include "SimplePelvisDrawAddedNode.any"
  };

  AnyRefNode Point50onG = {
    sRel = {-0.006238, 0.001651, -0.010062};
    #include "SimplePelvisDrawAddedNode.any"
  };

  AnyRefNode Point51onG = {
    sRel = {-0.004721, 0.001249, -0.008778};
    #include "SimplePelvisDrawAddedNode.any"
  };

  AnyRefNode Point52onG = {
    sRel = {-0.003374, 0.000893, -0.007423};
    #include "SimplePelvisDrawAddedNode.any"
  };

  AnyRefNode Point53onG = {
    sRel = {-0.002221, 0.000588, -0.006009};
    #include "SimplePelvisDrawAddedNode.any"
  };

  AnyRefNode Point54onG = {
    sRel = {-0.001284, 0.000340, -0.004548};
    #include "SimplePelvisDrawAddedNode.any"
  };

  AnyRefNode Point55onG = {
    sRel = {-0.000586, 0.000155, -0.003052};
    #include "SimplePelvisDrawAddedNode.any"
  };

  AnyRefNode Point56onG = {
    sRel = {-0.000150, 0.000040, -0.001532};
    #include "SimplePelvisDrawAddedNode.any"
  };

};
//End of nodes on SegPointG


SegPointA = {

  AnyRefNode Point12onA = {
    sRel = {0.018950, -0.005014, 0.000254};
    #include "SimplePelvisDrawAddedNode.any"
  };

  AnyRefNode Point13onA = {
    sRel = {0.016925, -0.004479, 0.001007};
    #include "SimplePelvisDrawAddedNode.any"
  };

  AnyRefNode Point14onA = {
    sRel = {0.014869, -0.003935, 0.001619};
    #include "SimplePelvisDrawAddedNode.any"
  };

  AnyRefNode Point15onA = {
    sRel = {0.012802, -0.003388, 0.002077};
    #include "SimplePelvisDrawAddedNode.any"
  };

  AnyRefNode Point16onA = {
    sRel = {0.010749, -0.002844, 0.002370};
    #include "SimplePelvisDrawAddedNode.any"
  };

  AnyRefNode Point17onA = {
    sRel = {0.008733, -0.002311, 0.002486};
    #include "SimplePelvisDrawAddedNode.any"
  };

  AnyRefNode Point18onA = {
    sRel = {0.006776, -0.001793, 0.002414};
    #include "SimplePelvisDrawAddedNode.any"
  };

  AnyRefNode Point19onA = {
    sRel = {0.004901, -0.001297, 0.002141};
    #include "SimplePelvisDrawAddedNode.any"
  };

  AnyRefNode Point20onA = {
    sRel = {0.003131, -0.000829, 0.001655};
    #include "SimplePelvisDrawAddedNode.any"
  };

  AnyRefNode Point21onA = {
    sRel = {0.001490, -0.000394, 0.000946};
    #include "SimplePelvisDrawAddedNode.any"
  };

  AnyRefNode Point22onA = {
    sRel = {0.000000, 0.000000, 0.000000};
    #include "SimplePelvisDrawAddedNode.any"
  };

  AnyRefNode Point23onA = {
    sRel = {-0.001506, 0.000399, -0.001388};
    #include "SimplePelvisDrawAddedNode.any"
  };

  AnyRefNode Point24onA = {
    sRel = {-0.002781, 0.000736, -0.003059};
    #include "SimplePelvisDrawAddedNode.any"
  };

  AnyRefNode Point25onA = {
    sRel = {-0.003824, 0.001012, -0.004964};
    #include "SimplePelvisDrawAddedNode.any"
  };

  AnyRefNode Point26onA = {
    sRel = {-0.004635, 0.001227, -0.007059};
    #include "SimplePelvisDrawAddedNode.any"
  };

  AnyRefNode Point27onA = {
    sRel = {-0.005215, 0.001380, -0.009294};
    #include "SimplePelvisDrawAddedNode.any"
  };

  AnyRefNode Point28onA = {
    sRel = {-0.005562, 0.001472, -0.011623};
    #include "SimplePelvisDrawAddedNode.any"
  };

  AnyRefNode Point29onA = {
    sRel = {-0.005678, 0.001503, -0.014000};
    #include "SimplePelvisDrawAddedNode.any"
  };

};
//End of nodes on SegPointA


SegPointB = {

  AnyRefNode Point30onB = {
    sRel = {-0.005562, 0.001472, 0.011623};
    #include "SimplePelvisDrawAddedNode.any"
  };

  AnyRefNode Point31onB = {
    sRel = {-0.005215, 0.001380, 0.009294};
    #include "SimplePelvisDrawAddedNode.any"
  };

  AnyRefNode Point32onB = {
    sRel = {-0.004635, 0.001227, 0.007059};
    #include "SimplePelvisDrawAddedNode.any"
  };

  AnyRefNode Point33onB = {
    sRel = {-0.003824, 0.001012, 0.004964};
    #include "SimplePelvisDrawAddedNode.any"
  };

  AnyRefNode Point34onB = {
    sRel = {-0.002781, 0.000736, 0.003059};
    #include "SimplePelvisDrawAddedNode.any"
  };

  AnyRefNode Point35onB = {
    sRel = {-0.001506, 0.000399, 0.001388};
    #include "SimplePelvisDrawAddedNode.any"
  };

  AnyRefNode Point36onB = {
    sRel = {0.000000, 0.000000, 0.000000};
    #include "SimplePelvisDrawAddedNode.any"
  };

  AnyRefNode Point37onB = {
    sRel = {0.001490, -0.000394, -0.000946};
    #include "SimplePelvisDrawAddedNode.any"
  };

  AnyRefNode Point38onB = {
    sRel = {0.003131, -0.000829, -0.001655};
    #include "SimplePelvisDrawAddedNode.any"
  };

  AnyRefNode Point39onB = {
    sRel = {0.004901, -0.001297, -0.002141};
    #include "SimplePelvisDrawAddedNode.any"
  };

  AnyRefNode Point40onB = {
    sRel = {0.006776, -0.001793, -0.002414};
    #include "SimplePelvisDrawAddedNode.any"
  };

  AnyRefNode Point41onB = {
    sRel = {0.008733, -0.002311, -0.002486};
    #include "SimplePelvisDrawAddedNode.any"
  };

  AnyRefNode Point42onB = {
    sRel = {0.010749, -0.002844, -0.002370};
    #include "SimplePelvisDrawAddedNode.any"
  };

  AnyRefNode Point43onB = {
    sRel = {0.012802, -0.003388, -0.002077};
    #include "SimplePelvisDrawAddedNode.any"
  };

  AnyRefNode Point44onB = {
    sRel = {0.014869, -0.003935, -0.001619};
    #include "SimplePelvisDrawAddedNode.any"
  };

  AnyRefNode Point45onB = {
    sRel = {0.016925, -0.004479, -0.001007};
    #include "SimplePelvisDrawAddedNode.any"
  };

  AnyRefNode Point46onB = {
    sRel = {0.018950, -0.005014, -0.000254};
    #include "SimplePelvisDrawAddedNode.any"
  };

};
//End of nodes on SegPointB
