/*
  In this file the study on the model with integrated SimplePelvis are defined.
  This includes:
    - basic study parameters
    - calibration study
    - additional operations
*/

Main = {
  // -------------------------------------------------------------------
  // ---------------- ADDITIONAL STUDY SETUP ---------------------------
  // -------------------------------------------------------------------

  #if BM_SIMPLEPELVIS == ON
    Study = {

      AnyFolder &Joints               = Main.SimplePelvisJoints; // reference testcase joints (of SimplePelvis) within study
      AnyFolder &SimplePelvisDrivers  = Main.SimplePelvisDrivers; // reference testcase drivers (of SimplePelvis) within study

    }; // -------------------------------------- END OF STUDY SETUP


    // -------------------------------------------------------------------
    // ----------------------- CALIBRATION STUDY  ------------------------
    // -------------------------------------------------------------------

    // A new calibration study - with a model specifically set up for calibration
    AnyBodyCalibrationStudy CalibrationStudy = {
      AnyFolder &Seg        = Main.HumanModel.BodyModel.Trunk.Segments.SimplePelvis;
      AnyFolder &Jnt        = Main.SimplePelvisCalibrationJoints;
      AnyFolder &Mus        = Main.HumanModel.BodyModel.Trunk.Muscles.SimplePelvisMuscles;
      AnyFolder &Lig        = Main.HumanModel.BodyModel.Trunk.ElasticElements.Ligaments.SimplePelvisLigaments;
      AnyFolder &CalDrv     = Main.SimplePelvisCalibrationDrivers;

      AnySeg &Pelvis        = Main.HumanModel.BodyModel.Trunk.Segments.PelvisSeg; // we also need PelvisSeg because of the nodes on it
      AnyFixedRefFrame &Gnd = Main.HumanModel.DefaultMannequinDrivers.GenericGRF;
      AnyStdJoint FixPelvis = {    // we must fix PelvisSeg to ground in order to have a kinematically determined model
        AnyRefFrame &grf  = .Gnd;
        AnyRefFrame &plv  = .Pelvis;
      };

      nStep = 21;
      RminMuscleFiber = {0.9, 0.9, 0.9, 0.9, 0.7, 0.7, 0.8, 0.8, 0.5, 0.5, 0.9, 0.9}; // default 0.5
      RmaxMuscleFiber = {1.1, 1.1, 1.1, 1.1, 1.2, 1.2, 1.2, 1.2, 1.2, 1.2, 1.1, 1.1}; // default 1.2

      MuscleArr = {
        &Main.HumanModel.BodyModel.Trunk.Muscles.SimplePelvisMuscles.MusclePaths.ICMposteriorright,
        &Main.HumanModel.BodyModel.Trunk.Muscles.SimplePelvisMuscles.MusclePaths.ICMposteriorleft,
        &Main.HumanModel.BodyModel.Trunk.Muscles.SimplePelvisMuscles.MusclePaths.ICManteriorright,
        &Main.HumanModel.BodyModel.Trunk.Muscles.SimplePelvisMuscles.MusclePaths.ICManteriorleft,
        &Main.HumanModel.BodyModel.Trunk.Muscles.SimplePelvisMuscles.MusclePaths.PPMright,
        &Main.HumanModel.BodyModel.Trunk.Muscles.SimplePelvisMuscles.MusclePaths.PPMleft,
        &Main.HumanModel.BodyModel.Trunk.Muscles.SimplePelvisMuscles.MusclePaths.PAMright,
        &Main.HumanModel.BodyModel.Trunk.Muscles.SimplePelvisMuscles.MusclePaths.PAMleft,
        &Main.HumanModel.BodyModel.Trunk.Muscles.SimplePelvisMuscles.MusclePaths.PVaMright,
        &Main.HumanModel.BodyModel.Trunk.Muscles.SimplePelvisMuscles.MusclePaths.PVaMleft,
        &Main.HumanModel.BodyModel.Trunk.Muscles.SimplePelvisMuscles.MusclePaths.PRMright,
        &Main.HumanModel.BodyModel.Trunk.Muscles.SimplePelvisMuscles.MusclePaths.PRMleft
      };

      LigamentArr = {
        &Main.HumanModel.BodyModel.Trunk.ElasticElements.Ligaments.SimplePelvisLigaments.LigamentPaths.AnococcygealLigament,
        &Main.HumanModel.BodyModel.Trunk.ElasticElements.Ligaments.SimplePelvisLigaments.LigamentPaths.AnalHiatus,
        &Main.HumanModel.BodyModel.Trunk.ElasticElements.Ligaments.SimplePelvisLigaments.LigamentPaths.UrogenitalHiatus,
        &Main.HumanModel.BodyModel.Trunk.ElasticElements.Ligaments.SimplePelvisLigaments.LigamentPaths.TendinousArchR,
        &Main.HumanModel.BodyModel.Trunk.ElasticElements.Ligaments.SimplePelvisLigaments.LigamentPaths.TendinousArchL,
        &Main.HumanModel.BodyModel.Trunk.ElasticElements.Ligaments.SimplePelvisLigaments.LigamentPaths.TA1,
        &Main.HumanModel.BodyModel.Trunk.ElasticElements.Ligaments.SimplePelvisLigaments.LigamentPaths.TA2,
        &Main.HumanModel.BodyModel.Trunk.ElasticElements.Ligaments.SimplePelvisLigaments.LigamentPaths.TA3,
        &Main.HumanModel.BodyModel.Trunk.ElasticElements.Ligaments.SimplePelvisLigaments.LigamentPaths.TA4,
        &Main.HumanModel.BodyModel.Trunk.ElasticElements.Ligaments.SimplePelvisLigaments.LigamentPaths.TA5,
        &Main.HumanModel.BodyModel.Trunk.ElasticElements.Ligaments.SimplePelvisLigaments.LigamentPaths.TA6,
        &Main.HumanModel.BodyModel.Trunk.ElasticElements.Ligaments.SimplePelvisLigaments.LigamentPaths.TA7,
        &Main.HumanModel.BodyModel.Trunk.ElasticElements.Ligaments.SimplePelvisLigaments.LigamentPaths.TA8
      };
    }; // -------------------------------------- END OF CALIBRATION STUDY
  #endif


  // -------------------------------------------------------------------
  // -------------------- ADDITIONAL OPERATIONS ------------------------
  // -------------------------------------------------------------------
    AnyOperationSequence RunApplication = {
      AnyOperation& ref = Main.Study.InverseDynamics;
    };

    AnyOperationSequence ModelSetUp = {
      AnyOperation& ref = Main.Study.InitialConditions;
    };

    #if BM_SIMPLEPELVIS == ON
      AnyOperationSequence SimplePelvisCalibration = {
        AnyOperation& op1 = Main.CalibrationStudy.FiberAndTendonLengthAdjustment;
        AnyOperation& op2 = Main.CalibrationStudy.LigamentLengthAdjustment;
        AnyOperation& op3 = Main.Study.InitialConditions;
      };

      AnyOperationSequence SimplePelvisCalibrationAndInverseDynamics = {
        AnyOperation& op1 = Main.CalibrationStudy.FiberAndTendonLengthAdjustment;
        AnyOperation& op2 = Main.CalibrationStudy.LigamentLengthAdjustment;
        AnyOperation& op3 = Main.Study.InverseDynamics;
      };
    #endif
  // -------------------------------------- END OF ADDITIONAL OPERATIONS

};
